// SBML level 3 version 2

model Figure2D_base_model_decay()
  // model units - substance: mole, time: second, volume: litre, area: square_metre, length: metre, extent: mole

  // Compartments:
  compartment default = 1e-6;

  // Species:
  species dna_Input_1 in default = 0;
  species rna_Input_1 in default = 0;
  species dna_Gate_1_2 in default = 0;
  species rna_Gate_1_2_pre in default = 0;
  species rna_Gate_1_2 in default = 0;
  species rna_Output_1_2 in default = 0;
  species dna_Signal_2_ss in default = 0;
  species rna_GateOut_1_1 in default = 0;
  species dna_Reporter_2 in default = 0;
  species rnadna_ReporterOut_2 in default = 0;

  // Parameters:
  ktx__ = 0.013;
  kmat__ = 0.00417;
  kx__ = 1e-6;
  krev__ = 2.7e-7;
  krep__ = 1e-5;
  k_test_decay = 0.0001;

  // Reactions:
  r0: dna_Input_1 => dna_Input_1 + rna_Input_1; default*ktx__*dna_Input_1;
  r1: dna_Gate_1_2 => dna_Gate_1_2 + rna_Gate_1_2_pre; default*ktx__*dna_Gate_1_2;
  r2: rna_Gate_1_2_pre => rna_Gate_1_2; default*kmat__*rna_Gate_1_2_pre;
  r3: rna_Gate_1_2 + rna_Input_1 => rna_Output_1_2 + rna_GateOut_1_1; default*kx__*rna_Gate_1_2*rna_Input_1;
  r3rev: rna_Output_1_2 + rna_GateOut_1_1 => rna_Gate_1_2 + rna_Input_1; default*krev__*rna_Output_1_2*rna_GateOut_1_1;
  r4: rna_Output_1_2 + dna_Reporter_2 => dna_Signal_2_ss + rnadna_ReporterOut_2; default*krep__*rna_Output_1_2*dna_Reporter_2;
  r_decay: rna_Output_1_2 => ; default*k_test_decay*rna_Output_1_2;

  // Unit definitions:
  unit square_metre = metre^2;
end
