// SBML level 3 version 2

model model()

  // Compartments:
  compartment default = 1;

  // Species:
  species uRSDg in default = 0;
  species RSDg in default = 0;
  species IN in default = 0;
  species OUT in default = 0;
  species DRL in default = 500;
  species ROL in default = 0;
  species I_RSDg in default = 0;
  species F in default = 0;
  species F_RSDg in default = 0;
  species $F_temp in default = 0;
  species $IN_temp in default = 0;
  species $RSD_temp in default = 0;

  // Parameters:
  k_txn = 0.00962763757 per_second;
  ksd = 9.97801643e-6;
  kfsd = 2.29972555e-6;
  krev = 1.42705205e-6;
  kf_rep = 4.77116458e-6;
  kRz = 0.0406799972 per_second;
  klkg = 6.98976431e-5;
  basal_frac = 0.0220510273 dimensionless;

  // Reactions:
  d_uRSDg_dt: => uRSDg; k_txn*RSD_temp - kRz*uRSDg;  // modifiers: RSD_temp
  d_RSDg_dt: => RSDg; kRz*uRSDg - ksd*RSDg*IN + krev*I_RSDg*OUT - klkg*RSDg*F;  // modifiers: F, IN, I_RSDg, OUT, uRSDg
  d_IN_dt: => IN; k_txn*IN_temp - ksd*RSDg*IN + krev*I_RSDg*OUT + kfsd*I_RSDg*F;  // modifiers: F, IN_temp, I_RSDg, OUT, RSDg
  d_OUT_dt: => OUT; ksd*RSDg*IN - kf_rep*OUT*DRL - krev*I_RSDg*OUT + klkg*RSDg*F + basal_frac*k_txn*RSD_temp;  // modifiers: DRL, F, IN, I_RSDg, RSD_temp, RSDg
  d_DRL_dt: => DRL; -kf_rep*OUT*DRL;  // modifiers: OUT
  d_ROL_dt: => ROL; kf_rep*OUT*DRL;  // modifiers: DRL, OUT
  d_I_RSDg_dt: => I_RSDg; ksd*RSDg*IN - krev*I_RSDg*OUT - kfsd*I_RSDg*F;  // modifiers: F, IN, OUT, RSDg
  d_F_dt: => F; k_txn*F_temp - kfsd*I_RSDg*F + ksd*F_RSDg*IN - klkg*RSDg*F;  // modifiers: F_RSDg, F_temp, IN, I_RSDg, RSDg
  d_F_RSDg_dt: => F_RSDg; kfsd*I_RSDg*F - ksd*F_RSDg*IN + klkg*RSDg*F;  // modifiers: F, IN, I_RSDg, RSDg

  // Unit definitions:
  unit per_second = 1 / second;
end
